// SBML level 3 version 2

model combined_model_of__combined_model_of__combined_model_of__external_reservoir_model_combined_model_of__rnaexp_membrane_combined_model_of__biocrnpyler_894839_combined_model_of__combined_model_of__external_reservoir_model_combined_model_of__rnaexp_membrane_combined_model_of__biocrnpyler_827463()
  // model units - substance: mole, time: second, volume: litre, area: square_metre, length: metre, extent: mole

  // Compartments:
  compartment cell_3_external_combined = 4e-6 litre;
  compartment cell_3_internal_combined = 1e-6 litre;
  compartment cell_4_external_combined = 2e-6 litre;
  compartment cell_4_internal_combined = 1e-6 litre;

  // Species:
  species rna_rR1_e_external_reservoir_model_1_combined in cell_3_external_combined = 0;
  species sid in cell_3_internal_combined = 1;
  species rna_rR1_sid in cell_3_internal_combined = 0;
  species Core1_OFF_biocrnpyler_894839 in cell_3_internal_combined = 6000/cell_3_internal_combined;
  species complex_Core1_ON_biocrnpyler_894839 in cell_3_internal_combined = 0;
  species rna_rR1_1_combined in cell_3_internal_combined = 0;
  species dna_dA2_biocrnpyler_894839 in cell_3_internal_combined = 6000/cell_3_internal_combined;
  species rna_rR2_biocrnpyler_894839 in cell_3_internal_combined = 0;
  species protein_RNAP_biocrnpyler_894839 in cell_3_internal_combined = 300/cell_3_internal_combined;
  species protein_RNAseH_biocrnpyler_894839 in cell_3_internal_combined = 20/cell_3_internal_combined;
  species complex_Core1_AI_biocrnpyler_894839 in cell_3_internal_combined = 0;
  species complex_Core1_ON_protein_RNAP_biocrnpyler_894839 in cell_3_internal_combined = 0;
  species complex_Core1_OFF_protein_RNAP_biocrnpyler_894839 in cell_3_internal_combined = 0;
  species complex_Core1_AI_protein_RNAseH_biocrnpyler_894839 in cell_3_internal_combined = 0;
  species Core2_OFF_biocrnpyler_894839 in cell_3_internal_combined = 4000/cell_3_internal_combined;
  species complex_Core2_ON_biocrnpyler_894839 in cell_3_internal_combined = 0;
  species dna_dA1_biocrnpyler_894839 in cell_3_internal_combined = 6000/cell_3_internal_combined;
  species complex_Core2_AI_biocrnpyler_894839 in cell_3_internal_combined = 0;
  species complex_Core2_ON_protein_RNAP_biocrnpyler_894839 in cell_3_internal_combined = 0;
  species complex_Core2_OFF_protein_RNAP_biocrnpyler_894839 in cell_3_internal_combined = 0;
  species complex_Core2_AI_protein_RNAseH_biocrnpyler_894839 in cell_3_internal_combined = 0;
  species rna_rR1 in cell_4_internal_combined = 0;
  species Prod2_OFF_biocrnpyler_827463 in cell_4_internal_combined = 4000/cell_4_internal_combined;
  species complex_Prod2_ON_biocrnpyler_827463 in cell_4_internal_combined = 0;
  species BrocApt_biocrnpyler_827463 in cell_4_internal_combined = 0;
  species dA1_biocrnpyler_827463 in cell_4_internal_combined = 0;
  species rR1_biocrnpyler_827463 in cell_4_internal_combined = 0;
  species protein_RNAP_biocrnpyler_827463 in cell_4_internal_combined = 300/cell_4_internal_combined;
  species protein_RNAseH_biocrnpyler_827463 in cell_4_internal_combined = 20/cell_4_internal_combined;
  species complex_Prod2_AI_biocrnpyler_827463 in cell_4_internal_combined = 0;
  species complex_Prod2_ON_protein_RNAP_biocrnpyler_827463 in cell_4_internal_combined = 0;
  species complex_Prod2_OFF_protein_RNAP_biocrnpyler_827463 in cell_4_internal_combined = 0;
  species complex_Prod2_AI_protein_RNAseH_biocrnpyler_827463 in cell_4_internal_combined = 0;

  // Parameters:
  kb_combined = 0.2 per_second;
  kd_combined = 0.01 per_second;

  // Reactions:
  r0_biocrnpyler_894839: Core1_OFF_biocrnpyler_894839 + dna_dA2_biocrnpyler_894839 => complex_Core1_ON_biocrnpyler_894839; r0_biocrnpyler_894839_k*Core1_OFF_biocrnpyler_894839*dna_dA2_biocrnpyler_894839;
    r0_biocrnpyler_894839_k = 0.00394;
  r1_biocrnpyler_894839: complex_Core1_ON_biocrnpyler_894839 + rna_rR2_biocrnpyler_894839 => Core1_OFF_biocrnpyler_894839 + complex_Core1_AI_biocrnpyler_894839; r1_biocrnpyler_894839_k*complex_Core1_ON_biocrnpyler_894839*rna_rR2_biocrnpyler_894839;
    r1_biocrnpyler_894839_k = 0.0696;
  r2_biocrnpyler_894839: dna_dA2_biocrnpyler_894839 + rna_rR2_biocrnpyler_894839 => complex_Core1_AI_biocrnpyler_894839; r2_biocrnpyler_894839_k*dna_dA2_biocrnpyler_894839*rna_rR2_biocrnpyler_894839;
    r2_biocrnpyler_894839_k = 0.0696;
  r3_biocrnpyler_894839: complex_Core1_ON_biocrnpyler_894839 + protein_RNAP_biocrnpyler_894839 => complex_Core1_ON_protein_RNAP_biocrnpyler_894839; r3_biocrnpyler_894839_k*complex_Core1_ON_biocrnpyler_894839*protein_RNAP_biocrnpyler_894839;
    r3_biocrnpyler_894839_k = 38.85714;
  r3_1_biocrnpyler_894839: complex_Core1_ON_protein_RNAP_biocrnpyler_894839 => complex_Core1_ON_biocrnpyler_894839 + protein_RNAP_biocrnpyler_894839; r3_1_biocrnpyler_894839_k*complex_Core1_ON_protein_RNAP_biocrnpyler_894839;
    r3_1_biocrnpyler_894839_k = 10;
  r5_biocrnpyler_894839: complex_Core1_ON_protein_RNAP_biocrnpyler_894839 => complex_Core1_ON_biocrnpyler_894839 + rna_rR1_1_combined + protein_RNAP_biocrnpyler_894839; r5_biocrnpyler_894839_k*complex_Core1_ON_protein_RNAP_biocrnpyler_894839;
    r5_biocrnpyler_894839_k = 0.064;
  r6_biocrnpyler_894839: Core1_OFF_biocrnpyler_894839 + protein_RNAP_biocrnpyler_894839 => complex_Core1_OFF_protein_RNAP_biocrnpyler_894839; r6_biocrnpyler_894839_k*Core1_OFF_biocrnpyler_894839*protein_RNAP_biocrnpyler_894839;
    r6_biocrnpyler_894839_k = 9.530476;
  r6_1_biocrnpyler_894839: complex_Core1_OFF_protein_RNAP_biocrnpyler_894839 => Core1_OFF_biocrnpyler_894839 + protein_RNAP_biocrnpyler_894839; r6_1_biocrnpyler_894839_k*complex_Core1_OFF_protein_RNAP_biocrnpyler_894839;
    r6_1_biocrnpyler_894839_k = 10;
  r8_biocrnpyler_894839: complex_Core1_OFF_protein_RNAP_biocrnpyler_894839 => Core1_OFF_biocrnpyler_894839 + rna_rR1_1_combined + protein_RNAP_biocrnpyler_894839; r8_biocrnpyler_894839_k*complex_Core1_OFF_protein_RNAP_biocrnpyler_894839;
    r8_biocrnpyler_894839_k = 0.007;
  r9_biocrnpyler_894839: complex_Core1_AI_biocrnpyler_894839 + protein_RNAseH_biocrnpyler_894839 => complex_Core1_AI_protein_RNAseH_biocrnpyler_894839; r9_biocrnpyler_894839_k*complex_Core1_AI_biocrnpyler_894839*protein_RNAseH_biocrnpyler_894839;
    r9_biocrnpyler_894839_k = 111.8242;
  r9_1_biocrnpyler_894839: complex_Core1_AI_protein_RNAseH_biocrnpyler_894839 => complex_Core1_AI_biocrnpyler_894839 + protein_RNAseH_biocrnpyler_894839; r9_1_biocrnpyler_894839_k*complex_Core1_AI_protein_RNAseH_biocrnpyler_894839;
    r9_1_biocrnpyler_894839_k = 10;
  r11_biocrnpyler_894839: complex_Core1_AI_protein_RNAseH_biocrnpyler_894839 => dna_dA2_biocrnpyler_894839 + protein_RNAseH_biocrnpyler_894839; r11_biocrnpyler_894839_k*complex_Core1_AI_protein_RNAseH_biocrnpyler_894839;
    r11_biocrnpyler_894839_k = 0.176;
  r12_biocrnpyler_894839: Core2_OFF_biocrnpyler_894839 + dna_dA1_biocrnpyler_894839 => complex_Core2_ON_biocrnpyler_894839; r12_biocrnpyler_894839_k*Core2_OFF_biocrnpyler_894839*dna_dA1_biocrnpyler_894839;
    r12_biocrnpyler_894839_k = 0.00394;
  r13_biocrnpyler_894839: complex_Core2_ON_biocrnpyler_894839 + rna_rR1_1_combined => Core2_OFF_biocrnpyler_894839 + complex_Core2_AI_biocrnpyler_894839; r13_biocrnpyler_894839_k*complex_Core2_ON_biocrnpyler_894839*rna_rR1_1_combined;
    r13_biocrnpyler_894839_k = 0.0696;
  r14_biocrnpyler_894839: dna_dA1_biocrnpyler_894839 + rna_rR1_1_combined => complex_Core2_AI_biocrnpyler_894839; r14_biocrnpyler_894839_k*dna_dA1_biocrnpyler_894839*rna_rR1_1_combined;
    r14_biocrnpyler_894839_k = 0.0696;
  r15_biocrnpyler_894839: complex_Core2_ON_biocrnpyler_894839 + protein_RNAP_biocrnpyler_894839 => complex_Core2_ON_protein_RNAP_biocrnpyler_894839; r15_biocrnpyler_894839_k*complex_Core2_ON_biocrnpyler_894839*protein_RNAP_biocrnpyler_894839;
    r15_biocrnpyler_894839_k = 38.85714;
  r15_1_biocrnpyler_894839: complex_Core2_ON_protein_RNAP_biocrnpyler_894839 => complex_Core2_ON_biocrnpyler_894839 + protein_RNAP_biocrnpyler_894839; r15_1_biocrnpyler_894839_k*complex_Core2_ON_protein_RNAP_biocrnpyler_894839;
    r15_1_biocrnpyler_894839_k = 10;
  r17_biocrnpyler_894839: complex_Core2_ON_protein_RNAP_biocrnpyler_894839 => complex_Core2_ON_biocrnpyler_894839 + rna_rR2_biocrnpyler_894839 + protein_RNAP_biocrnpyler_894839; r17_biocrnpyler_894839_k*complex_Core2_ON_protein_RNAP_biocrnpyler_894839;
    r17_biocrnpyler_894839_k = 0.064;
  r18_biocrnpyler_894839: Core2_OFF_biocrnpyler_894839 + protein_RNAP_biocrnpyler_894839 => complex_Core2_OFF_protein_RNAP_biocrnpyler_894839; r18_biocrnpyler_894839_k*Core2_OFF_biocrnpyler_894839*protein_RNAP_biocrnpyler_894839;
    r18_biocrnpyler_894839_k = 9.530476;
  r18_1_biocrnpyler_894839: complex_Core2_OFF_protein_RNAP_biocrnpyler_894839 => Core2_OFF_biocrnpyler_894839 + protein_RNAP_biocrnpyler_894839; r18_1_biocrnpyler_894839_k*complex_Core2_OFF_protein_RNAP_biocrnpyler_894839;
    r18_1_biocrnpyler_894839_k = 10;
  r20_biocrnpyler_894839: complex_Core2_OFF_protein_RNAP_biocrnpyler_894839 => Core2_OFF_biocrnpyler_894839 + rna_rR2_biocrnpyler_894839 + protein_RNAP_biocrnpyler_894839; r20_biocrnpyler_894839_k*complex_Core2_OFF_protein_RNAP_biocrnpyler_894839;
    r20_biocrnpyler_894839_k = 0.007;
  r21_biocrnpyler_894839: complex_Core2_AI_biocrnpyler_894839 + protein_RNAseH_biocrnpyler_894839 => complex_Core2_AI_protein_RNAseH_biocrnpyler_894839; r21_biocrnpyler_894839_k*complex_Core2_AI_biocrnpyler_894839*protein_RNAseH_biocrnpyler_894839;
    r21_biocrnpyler_894839_k = 111.8242;
  r21_1_biocrnpyler_894839: complex_Core2_AI_protein_RNAseH_biocrnpyler_894839 => complex_Core2_AI_biocrnpyler_894839 + protein_RNAseH_biocrnpyler_894839; r21_1_biocrnpyler_894839_k*complex_Core2_AI_protein_RNAseH_biocrnpyler_894839;
    r21_1_biocrnpyler_894839_k = 10;
  r23_biocrnpyler_894839: complex_Core2_AI_protein_RNAseH_biocrnpyler_894839 => dna_dA1_biocrnpyler_894839 + protein_RNAseH_biocrnpyler_894839; r23_biocrnpyler_894839_k*complex_Core2_AI_protein_RNAseH_biocrnpyler_894839;
    r23_biocrnpyler_894839_k = 0.176;
  r0_biocrnpyler_827463: Prod2_OFF_biocrnpyler_827463 + dA1_biocrnpyler_827463 => complex_Prod2_ON_biocrnpyler_827463; r0_biocrnpyler_827463_k*Prod2_OFF_biocrnpyler_827463*dA1_biocrnpyler_827463;
    r0_biocrnpyler_827463_k = 0.00394;
  r1_biocrnpyler_827463: complex_Prod2_ON_biocrnpyler_827463 + rR1_biocrnpyler_827463 => Prod2_OFF_biocrnpyler_827463 + complex_Prod2_AI_biocrnpyler_827463; r1_biocrnpyler_827463_k*complex_Prod2_ON_biocrnpyler_827463*rR1_biocrnpyler_827463;
    r1_biocrnpyler_827463_k = 0.0696;
  r2_biocrnpyler_827463: dA1_biocrnpyler_827463 + rR1_biocrnpyler_827463 => complex_Prod2_AI_biocrnpyler_827463; r2_biocrnpyler_827463_k*dA1_biocrnpyler_827463*rR1_biocrnpyler_827463;
    r2_biocrnpyler_827463_k = 0.0696;
  r3_biocrnpyler_827463: complex_Prod2_ON_biocrnpyler_827463 + protein_RNAP_biocrnpyler_827463 => complex_Prod2_ON_protein_RNAP_biocrnpyler_827463; r3_biocrnpyler_827463_k*complex_Prod2_ON_biocrnpyler_827463*protein_RNAP_biocrnpyler_827463;
    r3_biocrnpyler_827463_k = 38.85714;
  r3_1_biocrnpyler_827463: complex_Prod2_ON_protein_RNAP_biocrnpyler_827463 => complex_Prod2_ON_biocrnpyler_827463 + protein_RNAP_biocrnpyler_827463; r3_1_biocrnpyler_827463_k*complex_Prod2_ON_protein_RNAP_biocrnpyler_827463;
    r3_1_biocrnpyler_827463_k = 10;
  r5_biocrnpyler_827463: complex_Prod2_ON_protein_RNAP_biocrnpyler_827463 => complex_Prod2_ON_biocrnpyler_827463 + BrocApt_biocrnpyler_827463 + protein_RNAP_biocrnpyler_827463; r5_biocrnpyler_827463_k*complex_Prod2_ON_protein_RNAP_biocrnpyler_827463;
    r5_biocrnpyler_827463_k = 0.064;
  r6_biocrnpyler_827463: Prod2_OFF_biocrnpyler_827463 + protein_RNAP_biocrnpyler_827463 => complex_Prod2_OFF_protein_RNAP_biocrnpyler_827463; r6_biocrnpyler_827463_k*Prod2_OFF_biocrnpyler_827463*protein_RNAP_biocrnpyler_827463;
    r6_biocrnpyler_827463_k = 9.530476;
  r6_1_biocrnpyler_827463: complex_Prod2_OFF_protein_RNAP_biocrnpyler_827463 => Prod2_OFF_biocrnpyler_827463 + protein_RNAP_biocrnpyler_827463; r6_1_biocrnpyler_827463_k*complex_Prod2_OFF_protein_RNAP_biocrnpyler_827463;
    r6_1_biocrnpyler_827463_k = 10;
  r8_biocrnpyler_827463: complex_Prod2_OFF_protein_RNAP_biocrnpyler_827463 => Prod2_OFF_biocrnpyler_827463 + BrocApt_biocrnpyler_827463 + protein_RNAP_biocrnpyler_827463; r8_biocrnpyler_827463_k*complex_Prod2_OFF_protein_RNAP_biocrnpyler_827463;
    r8_biocrnpyler_827463_k = 0.007;
  r9_biocrnpyler_827463: complex_Prod2_AI_biocrnpyler_827463 + protein_RNAseH_biocrnpyler_827463 => complex_Prod2_AI_protein_RNAseH_biocrnpyler_827463; r9_biocrnpyler_827463_k*complex_Prod2_AI_biocrnpyler_827463*protein_RNAseH_biocrnpyler_827463;
    r9_biocrnpyler_827463_k = 111.8242;
  r9_1_biocrnpyler_827463: complex_Prod2_AI_protein_RNAseH_biocrnpyler_827463 => complex_Prod2_AI_biocrnpyler_827463 + protein_RNAseH_biocrnpyler_827463; r9_1_biocrnpyler_827463_k*complex_Prod2_AI_protein_RNAseH_biocrnpyler_827463;
    r9_1_biocrnpyler_827463_k = 10;
  r11_biocrnpyler_827463: complex_Prod2_AI_protein_RNAseH_biocrnpyler_827463 => dA1_biocrnpyler_827463 + protein_RNAseH_biocrnpyler_827463; r11_biocrnpyler_827463_k*complex_Prod2_AI_protein_RNAseH_biocrnpyler_827463;
    r11_biocrnpyler_827463_k = 0.176;

  // Unit definitions:
  unit square_metre = metre^2;
  unit per_second = 1 / second;
  unit substance = dimensionless;
end
