// SBML level 3 version 2

model biocrnpyler_749711()
  // model units - substance: mole, time: second, volume: litre, area: square_metre, length: metre, extent: mole

  // Compartments:
  compartment default = 1e-6;

  // Species:
  species Prod2_OFF in default = 0;
  species complex_Prod2_ON in default = 0;
  species BrocApt in default = 0;
  species dna_dAP in default = 0;
  species rna_rR1P in default = 0;
  species protein_RNAP in default = 0;
  species protein_RNAseH in default = 0;
  species complex_Prod2_AI in default = 0;
  species complex_Prod2_ON_protein_RNAP in default = 0;
  species complex_Prod2_OFF_protein_RNAP in default = 0;
  species complex_Prod2_AI_protein_RNAseH in default = 0;

  // Reactions:
  r0: Prod2_OFF + dna_dAP => complex_Prod2_ON; r0_k*Prod2_OFF*dna_dAP;
    r0_k = 0.00394;
  r1: complex_Prod2_ON + rna_rR1P => Prod2_OFF + complex_Prod2_AI; r1_k*complex_Prod2_ON*rna_rR1P;
    r1_k = 0.0696;
  r2: dna_dAP + rna_rR1P => complex_Prod2_AI; r2_k*dna_dAP*rna_rR1P;
    r2_k = 0.0696;
  r3: complex_Prod2_ON + protein_RNAP => complex_Prod2_ON_protein_RNAP; r3_k*complex_Prod2_ON*protein_RNAP;
    r3_k = 38.85714;
  r3_1: complex_Prod2_ON_protein_RNAP => complex_Prod2_ON + protein_RNAP; r3_1_k*complex_Prod2_ON_protein_RNAP;
    r3_1_k = 10;
  r5: complex_Prod2_ON_protein_RNAP => complex_Prod2_ON + BrocApt + protein_RNAP; r5_k*complex_Prod2_ON_protein_RNAP;
    r5_k = 0.064;
  r6: Prod2_OFF + protein_RNAP => complex_Prod2_OFF_protein_RNAP; r6_k*Prod2_OFF*protein_RNAP;
    r6_k = 9.530476;
  r6_1: complex_Prod2_OFF_protein_RNAP => Prod2_OFF + protein_RNAP; r6_1_k*complex_Prod2_OFF_protein_RNAP;
    r6_1_k = 10;
  r8: complex_Prod2_OFF_protein_RNAP => Prod2_OFF + BrocApt + protein_RNAP; r8_k*complex_Prod2_OFF_protein_RNAP;
    r8_k = 0.007;
  r9: complex_Prod2_AI + protein_RNAseH => complex_Prod2_AI_protein_RNAseH; r9_k*complex_Prod2_AI*protein_RNAseH;
    r9_k = 111.8242;
  r9_1: complex_Prod2_AI_protein_RNAseH => complex_Prod2_AI + protein_RNAseH; r9_1_k*complex_Prod2_AI_protein_RNAseH;
    r9_1_k = 10;
  r11: complex_Prod2_AI_protein_RNAseH => dna_dAP + protein_RNAseH; r11_k*complex_Prod2_AI_protein_RNAseH;
    r11_k = 0.176;

  // Unit definitions:
  unit square_metre = metre^2;
end
