// SBML level 3 version 2

model combined_model_of__combined_model_of__external_environment_model_combined_model_of__rnaexp_membrane2_rnaexp_membrane_combined_model_of__combined_model_of__biocrnpyler_129318_biocrnpyler_812450()
  // model units - substance: mole, time: second, volume: litre, area: square_metre, length: metre, extent: mole

  // Compartments:
  compartment cell_3_internal_combined = 3e-6 litre;
  compartment actual_external = 1e-6 litre;

  // Species:
  species sidB in cell_3_internal_combined = 1;
  species BrocApt_e_external_environment_model_1_combined in actual_external = 0;
  species BrocApt_sidB in cell_3_internal_combined = 0;
  species sid in cell_3_internal_combined = 1;
  species rna_rR1_e_external_environment_model_1_combined in actual_external = 250/actual_external;
  species rna_rR1_e_sid in cell_3_internal_combined = 0;
  species rna_rR1P_sid in cell_3_internal_combined = 0;
  species Prod2_OFF_biocrnpyler_129318_combined_model_of__biocrnpyler_129318_biocrnpyler_812450 in cell_3_internal_combined = 50/cell_3_internal_combined;
  species complex_Prod2_ON_biocrnpyler_129318_combined_model_of__biocrnpyler_129318_biocrnpyler_812450 in cell_3_internal_combined = 0;
  species dna_dAP_biocrnpyler_129318_combined_model_of__biocrnpyler_129318_biocrnpyler_812450 in cell_3_internal_combined = 50/cell_3_internal_combined;
  species rna_rR1P_1_combined in cell_3_internal_combined = 0;
  species protein_RNAP_biocrnpyler_129318_combined_model_of__biocrnpyler_129318_biocrnpyler_812450 in cell_3_internal_combined = 1.25/cell_3_internal_combined;
  species protein_RNAseH_biocrnpyler_129318_combined_model_of__biocrnpyler_129318_biocrnpyler_812450 in cell_3_internal_combined = 0.1665/cell_3_internal_combined;
  species complex_Prod2_AI_biocrnpyler_129318_combined_model_of__biocrnpyler_129318_biocrnpyler_812450 in cell_3_internal_combined = 0;
  species complex_Prod2_ON_protein_RNAP_biocrnpyler_129318_combined_model_of__biocrnpyler_129318_biocrnpyler_812450 in cell_3_internal_combined = 0;
  species complex_Prod2_OFF_protein_RNAP_biocrnpyler_129318_combined_model_of__biocrnpyler_129318_biocrnpyler_812450 in cell_3_internal_combined = 0;
  species complex_Prod2_AI_protein_RNAseH_biocrnpyler_129318_combined_model_of__biocrnpyler_129318_biocrnpyler_812450 in cell_3_internal_combined = 0;
  species BrocApt_1_combined in cell_3_internal_combined = 0;
  species DFHBI_biocrnpyler_812450_combined_model_of__biocrnpyler_129318_biocrnpyler_812450 in cell_3_internal_combined = 10000/cell_3_internal_combined;
  species complex_BrocApt_DFHBI_biocrnpyler_812450_combined_model_of__biocrnpyler_129318_biocrnpyler_812450 in cell_3_internal_combined = 0;

  // Parameters:
  kc = 0.2 per_second;
  ke = 0.01 per_second;
  kb1 = 0.01 per_second;
  kd1 = 0.2 per_second;

  // Reactions:
  R5: sidB + BrocApt_1_combined -> BrocApt_sidB; kc*sidB*BrocApt_1_combined - ke*BrocApt_sidB;
  R6: BrocApt_sidB -> BrocApt_e_external_environment_model_1_combined + sidB; ke*BrocApt_sidB - kc*sidB*BrocApt_e_external_environment_model_1_combined;
  R3: sid + rna_rR1_e_external_environment_model_1_combined -> rna_rR1_e_sid; kb1*sid*rna_rR1_e_external_environment_model_1_combined - kd1*rna_rR1_e_sid;
  R4: rna_rR1_e_sid -> rna_rR1P_1_combined + sid; kd1*rna_rR1_e_sid - kb1*sid*rna_rR1P_1_combined;
  r0_biocrnpyler_129318_combined_model_of__biocrnpyler_129318_biocrnpyler_812450: Prod2_OFF_biocrnpyler_129318_combined_model_of__biocrnpyler_129318_biocrnpyler_812450 + dna_dAP_biocrnpyler_129318_combined_model_of__biocrnpyler_129318_biocrnpyler_812450 => complex_Prod2_ON_biocrnpyler_129318_combined_model_of__biocrnpyler_129318_biocrnpyler_812450; r0_biocrnpyler_129318_combined_model_of__biocrnpyler_129318_biocrnpyler_812450_k*Prod2_OFF_biocrnpyler_129318_combined_model_of__biocrnpyler_129318_biocrnpyler_812450*dna_dAP_biocrnpyler_129318_combined_model_of__biocrnpyler_129318_biocrnpyler_812450;
    r0_biocrnpyler_129318_combined_model_of__biocrnpyler_129318_biocrnpyler_812450_k = 0.00394;
  r1_biocrnpyler_129318_combined_model_of__biocrnpyler_129318_biocrnpyler_812450: complex_Prod2_ON_biocrnpyler_129318_combined_model_of__biocrnpyler_129318_biocrnpyler_812450 + rna_rR1P_1_combined => Prod2_OFF_biocrnpyler_129318_combined_model_of__biocrnpyler_129318_biocrnpyler_812450 + complex_Prod2_AI_biocrnpyler_129318_combined_model_of__biocrnpyler_129318_biocrnpyler_812450; r1_biocrnpyler_129318_combined_model_of__biocrnpyler_129318_biocrnpyler_812450_k*complex_Prod2_ON_biocrnpyler_129318_combined_model_of__biocrnpyler_129318_biocrnpyler_812450*rna_rR1P_1_combined;
    r1_biocrnpyler_129318_combined_model_of__biocrnpyler_129318_biocrnpyler_812450_k = 0.0696;
  r2_biocrnpyler_129318_combined_model_of__biocrnpyler_129318_biocrnpyler_812450: dna_dAP_biocrnpyler_129318_combined_model_of__biocrnpyler_129318_biocrnpyler_812450 + rna_rR1P_1_combined => complex_Prod2_AI_biocrnpyler_129318_combined_model_of__biocrnpyler_129318_biocrnpyler_812450; r2_biocrnpyler_129318_combined_model_of__biocrnpyler_129318_biocrnpyler_812450_k*dna_dAP_biocrnpyler_129318_combined_model_of__biocrnpyler_129318_biocrnpyler_812450*rna_rR1P_1_combined;
    r2_biocrnpyler_129318_combined_model_of__biocrnpyler_129318_biocrnpyler_812450_k = 0.0696;
  r3_biocrnpyler_129318_combined_model_of__biocrnpyler_129318_biocrnpyler_812450: complex_Prod2_ON_biocrnpyler_129318_combined_model_of__biocrnpyler_129318_biocrnpyler_812450 + protein_RNAP_biocrnpyler_129318_combined_model_of__biocrnpyler_129318_biocrnpyler_812450 => complex_Prod2_ON_protein_RNAP_biocrnpyler_129318_combined_model_of__biocrnpyler_129318_biocrnpyler_812450; r3_biocrnpyler_129318_combined_model_of__biocrnpyler_129318_biocrnpyler_812450_k*complex_Prod2_ON_biocrnpyler_129318_combined_model_of__biocrnpyler_129318_biocrnpyler_812450*protein_RNAP_biocrnpyler_129318_combined_model_of__biocrnpyler_129318_biocrnpyler_812450;
    r3_biocrnpyler_129318_combined_model_of__biocrnpyler_129318_biocrnpyler_812450_k = 38.85714;
  r3_1_biocrnpyler_129318_combined_model_of__biocrnpyler_129318_biocrnpyler_812450: complex_Prod2_ON_protein_RNAP_biocrnpyler_129318_combined_model_of__biocrnpyler_129318_biocrnpyler_812450 => complex_Prod2_ON_biocrnpyler_129318_combined_model_of__biocrnpyler_129318_biocrnpyler_812450 + protein_RNAP_biocrnpyler_129318_combined_model_of__biocrnpyler_129318_biocrnpyler_812450; r3_1_biocrnpyler_129318_combined_model_of__biocrnpyler_129318_biocrnpyler_812450_k*complex_Prod2_ON_protein_RNAP_biocrnpyler_129318_combined_model_of__biocrnpyler_129318_biocrnpyler_812450;
    r3_1_biocrnpyler_129318_combined_model_of__biocrnpyler_129318_biocrnpyler_812450_k = 10;
  r5_biocrnpyler_129318_combined_model_of__biocrnpyler_129318_biocrnpyler_812450: complex_Prod2_ON_protein_RNAP_biocrnpyler_129318_combined_model_of__biocrnpyler_129318_biocrnpyler_812450 => complex_Prod2_ON_biocrnpyler_129318_combined_model_of__biocrnpyler_129318_biocrnpyler_812450 + BrocApt_1_combined + protein_RNAP_biocrnpyler_129318_combined_model_of__biocrnpyler_129318_biocrnpyler_812450; r5_biocrnpyler_129318_combined_model_of__biocrnpyler_129318_biocrnpyler_812450_k*complex_Prod2_ON_protein_RNAP_biocrnpyler_129318_combined_model_of__biocrnpyler_129318_biocrnpyler_812450;
    r5_biocrnpyler_129318_combined_model_of__biocrnpyler_129318_biocrnpyler_812450_k = 0.064;
  r6_biocrnpyler_129318_combined_model_of__biocrnpyler_129318_biocrnpyler_812450: Prod2_OFF_biocrnpyler_129318_combined_model_of__biocrnpyler_129318_biocrnpyler_812450 + protein_RNAP_biocrnpyler_129318_combined_model_of__biocrnpyler_129318_biocrnpyler_812450 => complex_Prod2_OFF_protein_RNAP_biocrnpyler_129318_combined_model_of__biocrnpyler_129318_biocrnpyler_812450; r6_biocrnpyler_129318_combined_model_of__biocrnpyler_129318_biocrnpyler_812450_k*Prod2_OFF_biocrnpyler_129318_combined_model_of__biocrnpyler_129318_biocrnpyler_812450*protein_RNAP_biocrnpyler_129318_combined_model_of__biocrnpyler_129318_biocrnpyler_812450;
    r6_biocrnpyler_129318_combined_model_of__biocrnpyler_129318_biocrnpyler_812450_k = 9.530476;
  r6_1_biocrnpyler_129318_combined_model_of__biocrnpyler_129318_biocrnpyler_812450: complex_Prod2_OFF_protein_RNAP_biocrnpyler_129318_combined_model_of__biocrnpyler_129318_biocrnpyler_812450 => Prod2_OFF_biocrnpyler_129318_combined_model_of__biocrnpyler_129318_biocrnpyler_812450 + protein_RNAP_biocrnpyler_129318_combined_model_of__biocrnpyler_129318_biocrnpyler_812450; r6_1_biocrnpyler_129318_combined_model_of__biocrnpyler_129318_biocrnpyler_812450_k*complex_Prod2_OFF_protein_RNAP_biocrnpyler_129318_combined_model_of__biocrnpyler_129318_biocrnpyler_812450;
    r6_1_biocrnpyler_129318_combined_model_of__biocrnpyler_129318_biocrnpyler_812450_k = 10;
  r8_biocrnpyler_129318_combined_model_of__biocrnpyler_129318_biocrnpyler_812450: complex_Prod2_OFF_protein_RNAP_biocrnpyler_129318_combined_model_of__biocrnpyler_129318_biocrnpyler_812450 => Prod2_OFF_biocrnpyler_129318_combined_model_of__biocrnpyler_129318_biocrnpyler_812450 + BrocApt_1_combined + protein_RNAP_biocrnpyler_129318_combined_model_of__biocrnpyler_129318_biocrnpyler_812450; r8_biocrnpyler_129318_combined_model_of__biocrnpyler_129318_biocrnpyler_812450_k*complex_Prod2_OFF_protein_RNAP_biocrnpyler_129318_combined_model_of__biocrnpyler_129318_biocrnpyler_812450;
    r8_biocrnpyler_129318_combined_model_of__biocrnpyler_129318_biocrnpyler_812450_k = 0.007;
  r9_biocrnpyler_129318_combined_model_of__biocrnpyler_129318_biocrnpyler_812450: complex_Prod2_AI_biocrnpyler_129318_combined_model_of__biocrnpyler_129318_biocrnpyler_812450 + protein_RNAseH_biocrnpyler_129318_combined_model_of__biocrnpyler_129318_biocrnpyler_812450 => complex_Prod2_AI_protein_RNAseH_biocrnpyler_129318_combined_model_of__biocrnpyler_129318_biocrnpyler_812450; r9_biocrnpyler_129318_combined_model_of__biocrnpyler_129318_biocrnpyler_812450_k*complex_Prod2_AI_biocrnpyler_129318_combined_model_of__biocrnpyler_129318_biocrnpyler_812450*protein_RNAseH_biocrnpyler_129318_combined_model_of__biocrnpyler_129318_biocrnpyler_812450;
    r9_biocrnpyler_129318_combined_model_of__biocrnpyler_129318_biocrnpyler_812450_k = 111.8242;
  r9_1_biocrnpyler_129318_combined_model_of__biocrnpyler_129318_biocrnpyler_812450: complex_Prod2_AI_protein_RNAseH_biocrnpyler_129318_combined_model_of__biocrnpyler_129318_biocrnpyler_812450 => complex_Prod2_AI_biocrnpyler_129318_combined_model_of__biocrnpyler_129318_biocrnpyler_812450 + protein_RNAseH_biocrnpyler_129318_combined_model_of__biocrnpyler_129318_biocrnpyler_812450; r9_1_biocrnpyler_129318_combined_model_of__biocrnpyler_129318_biocrnpyler_812450_k*complex_Prod2_AI_protein_RNAseH_biocrnpyler_129318_combined_model_of__biocrnpyler_129318_biocrnpyler_812450;
    r9_1_biocrnpyler_129318_combined_model_of__biocrnpyler_129318_biocrnpyler_812450_k = 10;
  r11_biocrnpyler_129318_combined_model_of__biocrnpyler_129318_biocrnpyler_812450: complex_Prod2_AI_protein_RNAseH_biocrnpyler_129318_combined_model_of__biocrnpyler_129318_biocrnpyler_812450 => dna_dAP_biocrnpyler_129318_combined_model_of__biocrnpyler_129318_biocrnpyler_812450 + protein_RNAseH_biocrnpyler_129318_combined_model_of__biocrnpyler_129318_biocrnpyler_812450; r11_biocrnpyler_129318_combined_model_of__biocrnpyler_129318_biocrnpyler_812450_k*complex_Prod2_AI_protein_RNAseH_biocrnpyler_129318_combined_model_of__biocrnpyler_129318_biocrnpyler_812450;
    r11_biocrnpyler_129318_combined_model_of__biocrnpyler_129318_biocrnpyler_812450_k = 0.176;
  r0_biocrnpyler_812450_combined_model_of__biocrnpyler_129318_biocrnpyler_812450: BrocApt_1_combined + DFHBI_biocrnpyler_812450_combined_model_of__biocrnpyler_129318_biocrnpyler_812450 => complex_BrocApt_DFHBI_biocrnpyler_812450_combined_model_of__biocrnpyler_129318_biocrnpyler_812450; r0_biocrnpyler_812450_combined_model_of__biocrnpyler_129318_biocrnpyler_812450_k*BrocApt_1_combined*DFHBI_biocrnpyler_812450_combined_model_of__biocrnpyler_129318_biocrnpyler_812450;
    r0_biocrnpyler_812450_combined_model_of__biocrnpyler_129318_biocrnpyler_812450_k = 9.96e-5;

  // Unit definitions:
  unit square_metre = metre^2;
  unit per_second = 1 / second;
  unit substance = dimensionless;
end
