// SBML level 3 version 2

model combined_model_of__combined_model_of__external_reservoir_model_combined_model_of__rnaexp_membrane_combined_model_of__biocrnpyler_827463()
  // model units - substance: mole, time: second, volume: litre, area: square_metre, length: metre, extent: mole

  // Compartments:
  compartment cell_4_external_combined = 2e-6 litre;
  compartment cell_4_internal_combined = 1e-6 litre;

  // Species:
  species rna_rR1_e_external_reservoir_model_1_combined in cell_4_external_combined = 0;
  species rna_rR1 in cell_4_internal_combined = 0;
  species sid in cell_4_internal_combined = 1;
  species rna_rR1_sid in cell_4_internal_combined = 0;
  species Prod2_OFF_biocrnpyler_827463 in cell_4_internal_combined = 0;
  species complex_Prod2_ON_biocrnpyler_827463 in cell_4_internal_combined = 0;
  species BrocApt_biocrnpyler_827463 in cell_4_internal_combined = 0;
  species dA1_biocrnpyler_827463 in cell_4_internal_combined = 0;
  species rR1_biocrnpyler_827463 in cell_4_internal_combined = 0;
  species protein_RNAP_biocrnpyler_827463 in cell_4_internal_combined = 0;
  species protein_RNAseH_biocrnpyler_827463 in cell_4_internal_combined = 0;
  species complex_Prod2_AI_biocrnpyler_827463 in cell_4_internal_combined = 0;
  species complex_Prod2_ON_protein_RNAP_biocrnpyler_827463 in cell_4_internal_combined = 0;
  species complex_Prod2_OFF_protein_RNAP_biocrnpyler_827463 in cell_4_internal_combined = 0;
  species complex_Prod2_AI_protein_RNAseH_biocrnpyler_827463 in cell_4_internal_combined = 0;

  // Parameters:
  kb = 0.2 per_second;
  kd = 0.01 per_second;

  // Reactions:
  R1: sid + rna_rR1 -> rna_rR1_sid; kb*sid*rna_rR1 - kd*rna_rR1_sid;
  R2: rna_rR1_sid -> rna_rR1_e_external_reservoir_model_1_combined + sid; kd*rna_rR1_sid - kb*sid*rna_rR1_e_external_reservoir_model_1_combined;
  r0_biocrnpyler_827463: Prod2_OFF_biocrnpyler_827463 + dA1_biocrnpyler_827463 => complex_Prod2_ON_biocrnpyler_827463; r0_biocrnpyler_827463_k*Prod2_OFF_biocrnpyler_827463*dA1_biocrnpyler_827463;
    r0_biocrnpyler_827463_k = 0.00394;
  r1_biocrnpyler_827463: complex_Prod2_ON_biocrnpyler_827463 + rR1_biocrnpyler_827463 => Prod2_OFF_biocrnpyler_827463 + complex_Prod2_AI_biocrnpyler_827463; r1_biocrnpyler_827463_k*complex_Prod2_ON_biocrnpyler_827463*rR1_biocrnpyler_827463;
    r1_biocrnpyler_827463_k = 0.0696;
  r2_biocrnpyler_827463: dA1_biocrnpyler_827463 + rR1_biocrnpyler_827463 => complex_Prod2_AI_biocrnpyler_827463; r2_biocrnpyler_827463_k*dA1_biocrnpyler_827463*rR1_biocrnpyler_827463;
    r2_biocrnpyler_827463_k = 0.0696;
  r3_biocrnpyler_827463: complex_Prod2_ON_biocrnpyler_827463 + protein_RNAP_biocrnpyler_827463 => complex_Prod2_ON_protein_RNAP_biocrnpyler_827463; r3_biocrnpyler_827463_k*complex_Prod2_ON_biocrnpyler_827463*protein_RNAP_biocrnpyler_827463;
    r3_biocrnpyler_827463_k = 38.85714;
  r3_1_biocrnpyler_827463: complex_Prod2_ON_protein_RNAP_biocrnpyler_827463 => complex_Prod2_ON_biocrnpyler_827463 + protein_RNAP_biocrnpyler_827463; r3_1_biocrnpyler_827463_k*complex_Prod2_ON_protein_RNAP_biocrnpyler_827463;
    r3_1_biocrnpyler_827463_k = 10;
  r5_biocrnpyler_827463: complex_Prod2_ON_protein_RNAP_biocrnpyler_827463 => complex_Prod2_ON_biocrnpyler_827463 + BrocApt_biocrnpyler_827463 + protein_RNAP_biocrnpyler_827463; r5_biocrnpyler_827463_k*complex_Prod2_ON_protein_RNAP_biocrnpyler_827463;
    r5_biocrnpyler_827463_k = 0.064;
  r6_biocrnpyler_827463: Prod2_OFF_biocrnpyler_827463 + protein_RNAP_biocrnpyler_827463 => complex_Prod2_OFF_protein_RNAP_biocrnpyler_827463; r6_biocrnpyler_827463_k*Prod2_OFF_biocrnpyler_827463*protein_RNAP_biocrnpyler_827463;
    r6_biocrnpyler_827463_k = 9.530476;
  r6_1_biocrnpyler_827463: complex_Prod2_OFF_protein_RNAP_biocrnpyler_827463 => Prod2_OFF_biocrnpyler_827463 + protein_RNAP_biocrnpyler_827463; r6_1_biocrnpyler_827463_k*complex_Prod2_OFF_protein_RNAP_biocrnpyler_827463;
    r6_1_biocrnpyler_827463_k = 10;
  r8_biocrnpyler_827463: complex_Prod2_OFF_protein_RNAP_biocrnpyler_827463 => Prod2_OFF_biocrnpyler_827463 + BrocApt_biocrnpyler_827463 + protein_RNAP_biocrnpyler_827463; r8_biocrnpyler_827463_k*complex_Prod2_OFF_protein_RNAP_biocrnpyler_827463;
    r8_biocrnpyler_827463_k = 0.007;
  r9_biocrnpyler_827463: complex_Prod2_AI_biocrnpyler_827463 + protein_RNAseH_biocrnpyler_827463 => complex_Prod2_AI_protein_RNAseH_biocrnpyler_827463; r9_biocrnpyler_827463_k*complex_Prod2_AI_biocrnpyler_827463*protein_RNAseH_biocrnpyler_827463;
    r9_biocrnpyler_827463_k = 111.8242;
  r9_1_biocrnpyler_827463: complex_Prod2_AI_protein_RNAseH_biocrnpyler_827463 => complex_Prod2_AI_biocrnpyler_827463 + protein_RNAseH_biocrnpyler_827463; r9_1_biocrnpyler_827463_k*complex_Prod2_AI_protein_RNAseH_biocrnpyler_827463;
    r9_1_biocrnpyler_827463_k = 10;
  r11_biocrnpyler_827463: complex_Prod2_AI_protein_RNAseH_biocrnpyler_827463 => dA1_biocrnpyler_827463 + protein_RNAseH_biocrnpyler_827463; r11_biocrnpyler_827463_k*complex_Prod2_AI_protein_RNAseH_biocrnpyler_827463;
    r11_biocrnpyler_827463_k = 0.176;

  // Unit definitions:
  unit square_metre = metre^2;
  unit per_second = 1 / second;
  unit substance = dimensionless;
end
