// SBML level 3 version 2

model biocrnpyler_844477()
  // model units - substance: mole, time: second, volume: litre, area: square_metre, length: metre, extent: mole

  // Compartments:
  compartment default_biocrnpyler_844477 = 1e-6;

  // Species:
  species Core1_OFF_biocrnpyler_844477 in default_biocrnpyler_844477 = 1.2/default_biocrnpyler_844477;
  species complex_Core1_ON_biocrnpyler_844477 in default_biocrnpyler_844477 = 0;
  species rna_rR1_biocrnpyler_844477 in default_biocrnpyler_844477 = 0;
  species dna_dA2_biocrnpyler_844477 in default_biocrnpyler_844477 = 1.2/default_biocrnpyler_844477;
  species rna_rR2_biocrnpyler_844477 in default_biocrnpyler_844477 = 0;
  species protein_RNAP_biocrnpyler_844477 in default_biocrnpyler_844477 = 0.03/default_biocrnpyler_844477;
  species protein_RNAseH_biocrnpyler_844477 in default_biocrnpyler_844477 = 0.0044/default_biocrnpyler_844477;
  species complex_Core1_AI_biocrnpyler_844477 in default_biocrnpyler_844477 = 0;
  species complex_Core1_ON_protein_RNAP_biocrnpyler_844477 in default_biocrnpyler_844477 = 0;
  species complex_Core1_OFF_protein_RNAP_biocrnpyler_844477 in default_biocrnpyler_844477 = 0;
  species complex_Core1_AI_protein_RNAseH_biocrnpyler_844477 in default_biocrnpyler_844477 = 0;
  species Core2_OFF_biocrnpyler_844477 in default_biocrnpyler_844477 = 0.99/default_biocrnpyler_844477;
  species complex_Core2_ON_biocrnpyler_844477 in default_biocrnpyler_844477 = 0;
  species dna_dA1_biocrnpyler_844477 in default_biocrnpyler_844477 = 1.2/default_biocrnpyler_844477;
  species complex_Core2_AI_biocrnpyler_844477 in default_biocrnpyler_844477 = 0;
  species complex_Core2_ON_protein_RNAP_biocrnpyler_844477 in default_biocrnpyler_844477 = 0;
  species complex_Core2_OFF_protein_RNAP_biocrnpyler_844477 in default_biocrnpyler_844477 = 0;
  species complex_Core2_AI_protein_RNAseH_biocrnpyler_844477 in default_biocrnpyler_844477 = 0;

  // Reactions:
  r0_biocrnpyler_844477: Core1_OFF_biocrnpyler_844477 + dna_dA2_biocrnpyler_844477 => complex_Core1_ON_biocrnpyler_844477; r0_biocrnpyler_844477_k*Core1_OFF_biocrnpyler_844477*dna_dA2_biocrnpyler_844477;
    r0_biocrnpyler_844477_k = 0.00394;
  r1_biocrnpyler_844477: complex_Core1_ON_biocrnpyler_844477 + rna_rR2_biocrnpyler_844477 => Core1_OFF_biocrnpyler_844477 + complex_Core1_AI_biocrnpyler_844477; r1_biocrnpyler_844477_k*complex_Core1_ON_biocrnpyler_844477*rna_rR2_biocrnpyler_844477;
    r1_biocrnpyler_844477_k = 0.0696;
  r2_biocrnpyler_844477: dna_dA2_biocrnpyler_844477 + rna_rR2_biocrnpyler_844477 => complex_Core1_AI_biocrnpyler_844477; r2_biocrnpyler_844477_k*dna_dA2_biocrnpyler_844477*rna_rR2_biocrnpyler_844477;
    r2_biocrnpyler_844477_k = 0.0696;
  r3_biocrnpyler_844477: complex_Core1_ON_biocrnpyler_844477 + protein_RNAP_biocrnpyler_844477 => complex_Core1_ON_protein_RNAP_biocrnpyler_844477; r3_biocrnpyler_844477_k*complex_Core1_ON_biocrnpyler_844477*protein_RNAP_biocrnpyler_844477;
    r3_biocrnpyler_844477_k = 38.85714;
  r3_1_biocrnpyler_844477: complex_Core1_ON_protein_RNAP_biocrnpyler_844477 => complex_Core1_ON_biocrnpyler_844477 + protein_RNAP_biocrnpyler_844477; r3_1_biocrnpyler_844477_k*complex_Core1_ON_protein_RNAP_biocrnpyler_844477;
    r3_1_biocrnpyler_844477_k = 10;
  r5_biocrnpyler_844477: complex_Core1_ON_protein_RNAP_biocrnpyler_844477 => complex_Core1_ON_biocrnpyler_844477 + rna_rR1_biocrnpyler_844477 + protein_RNAP_biocrnpyler_844477; r5_biocrnpyler_844477_k*complex_Core1_ON_protein_RNAP_biocrnpyler_844477;
    r5_biocrnpyler_844477_k = 0.064;
  r6_biocrnpyler_844477: Core1_OFF_biocrnpyler_844477 + protein_RNAP_biocrnpyler_844477 => complex_Core1_OFF_protein_RNAP_biocrnpyler_844477; r6_biocrnpyler_844477_k*Core1_OFF_biocrnpyler_844477*protein_RNAP_biocrnpyler_844477;
    r6_biocrnpyler_844477_k = 9.530476;
  r6_1_biocrnpyler_844477: complex_Core1_OFF_protein_RNAP_biocrnpyler_844477 => Core1_OFF_biocrnpyler_844477 + protein_RNAP_biocrnpyler_844477; r6_1_biocrnpyler_844477_k*complex_Core1_OFF_protein_RNAP_biocrnpyler_844477;
    r6_1_biocrnpyler_844477_k = 10;
  r8_biocrnpyler_844477: complex_Core1_OFF_protein_RNAP_biocrnpyler_844477 => Core1_OFF_biocrnpyler_844477 + rna_rR1_biocrnpyler_844477 + protein_RNAP_biocrnpyler_844477; r8_biocrnpyler_844477_k*complex_Core1_OFF_protein_RNAP_biocrnpyler_844477;
    r8_biocrnpyler_844477_k = 0.007;
  r9_biocrnpyler_844477: complex_Core1_AI_biocrnpyler_844477 + protein_RNAseH_biocrnpyler_844477 => complex_Core1_AI_protein_RNAseH_biocrnpyler_844477; r9_biocrnpyler_844477_k*complex_Core1_AI_biocrnpyler_844477*protein_RNAseH_biocrnpyler_844477;
    r9_biocrnpyler_844477_k = 111.8242;
  r9_1_biocrnpyler_844477: complex_Core1_AI_protein_RNAseH_biocrnpyler_844477 => complex_Core1_AI_biocrnpyler_844477 + protein_RNAseH_biocrnpyler_844477; r9_1_biocrnpyler_844477_k*complex_Core1_AI_protein_RNAseH_biocrnpyler_844477;
    r9_1_biocrnpyler_844477_k = 10;
  r11_biocrnpyler_844477: complex_Core1_AI_protein_RNAseH_biocrnpyler_844477 => dna_dA2_biocrnpyler_844477 + protein_RNAseH_biocrnpyler_844477; r11_biocrnpyler_844477_k*complex_Core1_AI_protein_RNAseH_biocrnpyler_844477;
    r11_biocrnpyler_844477_k = 0.176;
  r12_biocrnpyler_844477: Core2_OFF_biocrnpyler_844477 + dna_dA1_biocrnpyler_844477 => complex_Core2_ON_biocrnpyler_844477; r12_biocrnpyler_844477_k*Core2_OFF_biocrnpyler_844477*dna_dA1_biocrnpyler_844477;
    r12_biocrnpyler_844477_k = 0.00394;
  r13_biocrnpyler_844477: complex_Core2_ON_biocrnpyler_844477 + rna_rR1_biocrnpyler_844477 => Core2_OFF_biocrnpyler_844477 + complex_Core2_AI_biocrnpyler_844477; r13_biocrnpyler_844477_k*complex_Core2_ON_biocrnpyler_844477*rna_rR1_biocrnpyler_844477;
    r13_biocrnpyler_844477_k = 0.0696;
  r14_biocrnpyler_844477: dna_dA1_biocrnpyler_844477 + rna_rR1_biocrnpyler_844477 => complex_Core2_AI_biocrnpyler_844477; r14_biocrnpyler_844477_k*dna_dA1_biocrnpyler_844477*rna_rR1_biocrnpyler_844477;
    r14_biocrnpyler_844477_k = 0.0696;
  r15_biocrnpyler_844477: complex_Core2_ON_biocrnpyler_844477 + protein_RNAP_biocrnpyler_844477 => complex_Core2_ON_protein_RNAP_biocrnpyler_844477; r15_biocrnpyler_844477_k*complex_Core2_ON_biocrnpyler_844477*protein_RNAP_biocrnpyler_844477;
    r15_biocrnpyler_844477_k = 38.85714;
  r15_1_biocrnpyler_844477: complex_Core2_ON_protein_RNAP_biocrnpyler_844477 => complex_Core2_ON_biocrnpyler_844477 + protein_RNAP_biocrnpyler_844477; r15_1_biocrnpyler_844477_k*complex_Core2_ON_protein_RNAP_biocrnpyler_844477;
    r15_1_biocrnpyler_844477_k = 10;
  r17_biocrnpyler_844477: complex_Core2_ON_protein_RNAP_biocrnpyler_844477 => complex_Core2_ON_biocrnpyler_844477 + rna_rR2_biocrnpyler_844477 + protein_RNAP_biocrnpyler_844477; r17_biocrnpyler_844477_k*complex_Core2_ON_protein_RNAP_biocrnpyler_844477;
    r17_biocrnpyler_844477_k = 0.064;
  r18_biocrnpyler_844477: Core2_OFF_biocrnpyler_844477 + protein_RNAP_biocrnpyler_844477 => complex_Core2_OFF_protein_RNAP_biocrnpyler_844477; r18_biocrnpyler_844477_k*Core2_OFF_biocrnpyler_844477*protein_RNAP_biocrnpyler_844477;
    r18_biocrnpyler_844477_k = 9.530476;
  r18_1_biocrnpyler_844477: complex_Core2_OFF_protein_RNAP_biocrnpyler_844477 => Core2_OFF_biocrnpyler_844477 + protein_RNAP_biocrnpyler_844477; r18_1_biocrnpyler_844477_k*complex_Core2_OFF_protein_RNAP_biocrnpyler_844477;
    r18_1_biocrnpyler_844477_k = 10;
  r20_biocrnpyler_844477: complex_Core2_OFF_protein_RNAP_biocrnpyler_844477 => Core2_OFF_biocrnpyler_844477 + rna_rR2_biocrnpyler_844477 + protein_RNAP_biocrnpyler_844477; r20_biocrnpyler_844477_k*complex_Core2_OFF_protein_RNAP_biocrnpyler_844477;
    r20_biocrnpyler_844477_k = 0.007;
  r21_biocrnpyler_844477: complex_Core2_AI_biocrnpyler_844477 + protein_RNAseH_biocrnpyler_844477 => complex_Core2_AI_protein_RNAseH_biocrnpyler_844477; r21_biocrnpyler_844477_k*complex_Core2_AI_biocrnpyler_844477*protein_RNAseH_biocrnpyler_844477;
    r21_biocrnpyler_844477_k = 111.8242;
  r21_1_biocrnpyler_844477: complex_Core2_AI_protein_RNAseH_biocrnpyler_844477 => complex_Core2_AI_biocrnpyler_844477 + protein_RNAseH_biocrnpyler_844477; r21_1_biocrnpyler_844477_k*complex_Core2_AI_protein_RNAseH_biocrnpyler_844477;
    r21_1_biocrnpyler_844477_k = 10;
  r23_biocrnpyler_844477: complex_Core2_AI_protein_RNAseH_biocrnpyler_844477 => dna_dA1_biocrnpyler_844477 + protein_RNAseH_biocrnpyler_844477; r23_biocrnpyler_844477_k*complex_Core2_AI_protein_RNAseH_biocrnpyler_844477;
    r23_biocrnpyler_844477_k = 0.176;

  // Unit definitions:
  unit square_metre = metre^2;
end
