// SBML level 3 version 2

model combined_model_of__combined_model_of__external_reservoir_model_combined_model_of__rR1_membrane_combined_model_of__biocrnpyler_287046()
  // model units - substance: mole, time: second, volume: litre, area: square_metre, length: metre, extent: mole

  // Compartments:
  compartment cell_1_external_combined = 2e-6 litre;
  compartment cell_1_internal_combined = 1e-6 litre;

  // Species:
  species rna_rR1_e_external_reservoir_model_1_combined in cell_1_external_combined = 200/cell_1_external_combined;
  species Core1_OFF_biocrnpyler_287046 in cell_1_internal_combined = 6000/cell_1_internal_combined;
  species complex_Core1_ON_biocrnpyler_287046 in cell_1_internal_combined = 0;
  species rna_rR1_i_1_combined in cell_1_internal_combined = 0;
  species dna_dA2_biocrnpyler_287046 in cell_1_internal_combined = 6000/cell_1_internal_combined;
  species rna_rR2_biocrnpyler_287046 in cell_1_internal_combined = 0;
  species protein_RNAP_biocrnpyler_287046 in cell_1_internal_combined = 150/cell_1_internal_combined;
  species protein_RNAseH_biocrnpyler_287046 in cell_1_internal_combined = 50/cell_1_internal_combined;
  species complex_Core1_AI_biocrnpyler_287046 in cell_1_internal_combined = 0;
  species complex_Core1_ON_protein_RNAP_biocrnpyler_287046 in cell_1_internal_combined = 0;
  species complex_Core1_OFF_protein_RNAP_biocrnpyler_287046 in cell_1_internal_combined = 0;
  species complex_Core1_AI_protein_RNAseH_biocrnpyler_287046 in cell_1_internal_combined = 0;
  species Core2_OFF_biocrnpyler_287046 in cell_1_internal_combined = 5000/cell_1_internal_combined;
  species complex_Core2_ON_biocrnpyler_287046 in cell_1_internal_combined = 0;
  species dna_dA1_biocrnpyler_287046 in cell_1_internal_combined = 6000/cell_1_internal_combined;
  species complex_Core2_AI_biocrnpyler_287046 in cell_1_internal_combined = 0;
  species complex_Core2_ON_protein_RNAP_biocrnpyler_287046 in cell_1_internal_combined = 0;
  species complex_Core2_OFF_protein_RNAP_biocrnpyler_287046 in cell_1_internal_combined = 0;
  species complex_Core2_AI_protein_RNAseH_biocrnpyler_287046 in cell_1_internal_combined = 0;

  // Parameters:
  kb = 0.002 per_second;
  kd = 1e-5 per_second;

  // Reactions:
  r1: rna_rR1_e_external_reservoir_model_1_combined -> rna_rR1_i_1_combined; kb*rna_rR1_e_external_reservoir_model_1_combined - kd*rna_rR1_i_1_combined;
  r0_biocrnpyler_287046: Core1_OFF_biocrnpyler_287046 + dna_dA2_biocrnpyler_287046 => complex_Core1_ON_biocrnpyler_287046; r0_biocrnpyler_287046_k*Core1_OFF_biocrnpyler_287046*dna_dA2_biocrnpyler_287046;
    r0_biocrnpyler_287046_k = 0.00394;
  r1_biocrnpyler_287046: complex_Core1_ON_biocrnpyler_287046 + rna_rR2_biocrnpyler_287046 => Core1_OFF_biocrnpyler_287046 + complex_Core1_AI_biocrnpyler_287046; r1_biocrnpyler_287046_k*complex_Core1_ON_biocrnpyler_287046*rna_rR2_biocrnpyler_287046;
    r1_biocrnpyler_287046_k = 0.0696;
  r2_biocrnpyler_287046: dna_dA2_biocrnpyler_287046 + rna_rR2_biocrnpyler_287046 => complex_Core1_AI_biocrnpyler_287046; r2_biocrnpyler_287046_k*dna_dA2_biocrnpyler_287046*rna_rR2_biocrnpyler_287046;
    r2_biocrnpyler_287046_k = 0.0696;
  r3_biocrnpyler_287046: complex_Core1_ON_biocrnpyler_287046 + protein_RNAP_biocrnpyler_287046 => complex_Core1_ON_protein_RNAP_biocrnpyler_287046; r3_biocrnpyler_287046_k*complex_Core1_ON_biocrnpyler_287046*protein_RNAP_biocrnpyler_287046;
    r3_biocrnpyler_287046_k = 38.85714;
  r3_1_biocrnpyler_287046: complex_Core1_ON_protein_RNAP_biocrnpyler_287046 => complex_Core1_ON_biocrnpyler_287046 + protein_RNAP_biocrnpyler_287046; r3_1_biocrnpyler_287046_k*complex_Core1_ON_protein_RNAP_biocrnpyler_287046;
    r3_1_biocrnpyler_287046_k = 10;
  r5_biocrnpyler_287046: complex_Core1_ON_protein_RNAP_biocrnpyler_287046 => complex_Core1_ON_biocrnpyler_287046 + rna_rR1_i_1_combined + protein_RNAP_biocrnpyler_287046; r5_biocrnpyler_287046_k*complex_Core1_ON_protein_RNAP_biocrnpyler_287046;
    r5_biocrnpyler_287046_k = 0.064;
  r6_biocrnpyler_287046: Core1_OFF_biocrnpyler_287046 + protein_RNAP_biocrnpyler_287046 => complex_Core1_OFF_protein_RNAP_biocrnpyler_287046; r6_biocrnpyler_287046_k*Core1_OFF_biocrnpyler_287046*protein_RNAP_biocrnpyler_287046;
    r6_biocrnpyler_287046_k = 9.530476;
  r6_1_biocrnpyler_287046: complex_Core1_OFF_protein_RNAP_biocrnpyler_287046 => Core1_OFF_biocrnpyler_287046 + protein_RNAP_biocrnpyler_287046; r6_1_biocrnpyler_287046_k*complex_Core1_OFF_protein_RNAP_biocrnpyler_287046;
    r6_1_biocrnpyler_287046_k = 10;
  r8_biocrnpyler_287046: complex_Core1_OFF_protein_RNAP_biocrnpyler_287046 => Core1_OFF_biocrnpyler_287046 + rna_rR1_i_1_combined + protein_RNAP_biocrnpyler_287046; r8_biocrnpyler_287046_k*complex_Core1_OFF_protein_RNAP_biocrnpyler_287046;
    r8_biocrnpyler_287046_k = 0.007;
  r9_biocrnpyler_287046: complex_Core1_AI_biocrnpyler_287046 + protein_RNAseH_biocrnpyler_287046 => complex_Core1_AI_protein_RNAseH_biocrnpyler_287046; r9_biocrnpyler_287046_k*complex_Core1_AI_biocrnpyler_287046*protein_RNAseH_biocrnpyler_287046;
    r9_biocrnpyler_287046_k = 111.8242;
  r9_1_biocrnpyler_287046: complex_Core1_AI_protein_RNAseH_biocrnpyler_287046 => complex_Core1_AI_biocrnpyler_287046 + protein_RNAseH_biocrnpyler_287046; r9_1_biocrnpyler_287046_k*complex_Core1_AI_protein_RNAseH_biocrnpyler_287046;
    r9_1_biocrnpyler_287046_k = 10;
  r11_biocrnpyler_287046: complex_Core1_AI_protein_RNAseH_biocrnpyler_287046 => dna_dA2_biocrnpyler_287046 + protein_RNAseH_biocrnpyler_287046; r11_biocrnpyler_287046_k*complex_Core1_AI_protein_RNAseH_biocrnpyler_287046;
    r11_biocrnpyler_287046_k = 0.176;
  r12_biocrnpyler_287046: Core2_OFF_biocrnpyler_287046 + dna_dA1_biocrnpyler_287046 => complex_Core2_ON_biocrnpyler_287046; r12_biocrnpyler_287046_k*Core2_OFF_biocrnpyler_287046*dna_dA1_biocrnpyler_287046;
    r12_biocrnpyler_287046_k = 0.00394;
  r13_biocrnpyler_287046: complex_Core2_ON_biocrnpyler_287046 + rna_rR1_i_1_combined => Core2_OFF_biocrnpyler_287046 + complex_Core2_AI_biocrnpyler_287046; r13_biocrnpyler_287046_k*complex_Core2_ON_biocrnpyler_287046*rna_rR1_i_1_combined;
    r13_biocrnpyler_287046_k = 0.0696;
  r14_biocrnpyler_287046: dna_dA1_biocrnpyler_287046 + rna_rR1_i_1_combined => complex_Core2_AI_biocrnpyler_287046; r14_biocrnpyler_287046_k*dna_dA1_biocrnpyler_287046*rna_rR1_i_1_combined;
    r14_biocrnpyler_287046_k = 0.0696;
  r15_biocrnpyler_287046: complex_Core2_ON_biocrnpyler_287046 + protein_RNAP_biocrnpyler_287046 => complex_Core2_ON_protein_RNAP_biocrnpyler_287046; r15_biocrnpyler_287046_k*complex_Core2_ON_biocrnpyler_287046*protein_RNAP_biocrnpyler_287046;
    r15_biocrnpyler_287046_k = 38.85714;
  r15_1_biocrnpyler_287046: complex_Core2_ON_protein_RNAP_biocrnpyler_287046 => complex_Core2_ON_biocrnpyler_287046 + protein_RNAP_biocrnpyler_287046; r15_1_biocrnpyler_287046_k*complex_Core2_ON_protein_RNAP_biocrnpyler_287046;
    r15_1_biocrnpyler_287046_k = 10;
  r17_biocrnpyler_287046: complex_Core2_ON_protein_RNAP_biocrnpyler_287046 => complex_Core2_ON_biocrnpyler_287046 + rna_rR2_biocrnpyler_287046 + protein_RNAP_biocrnpyler_287046; r17_biocrnpyler_287046_k*complex_Core2_ON_protein_RNAP_biocrnpyler_287046;
    r17_biocrnpyler_287046_k = 0.064;
  r18_biocrnpyler_287046: Core2_OFF_biocrnpyler_287046 + protein_RNAP_biocrnpyler_287046 => complex_Core2_OFF_protein_RNAP_biocrnpyler_287046; r18_biocrnpyler_287046_k*Core2_OFF_biocrnpyler_287046*protein_RNAP_biocrnpyler_287046;
    r18_biocrnpyler_287046_k = 9.530476;
  r18_1_biocrnpyler_287046: complex_Core2_OFF_protein_RNAP_biocrnpyler_287046 => Core2_OFF_biocrnpyler_287046 + protein_RNAP_biocrnpyler_287046; r18_1_biocrnpyler_287046_k*complex_Core2_OFF_protein_RNAP_biocrnpyler_287046;
    r18_1_biocrnpyler_287046_k = 10;
  r20_biocrnpyler_287046: complex_Core2_OFF_protein_RNAP_biocrnpyler_287046 => Core2_OFF_biocrnpyler_287046 + rna_rR2_biocrnpyler_287046 + protein_RNAP_biocrnpyler_287046; r20_biocrnpyler_287046_k*complex_Core2_OFF_protein_RNAP_biocrnpyler_287046;
    r20_biocrnpyler_287046_k = 0.007;
  r21_biocrnpyler_287046: complex_Core2_AI_biocrnpyler_287046 + protein_RNAseH_biocrnpyler_287046 => complex_Core2_AI_protein_RNAseH_biocrnpyler_287046; r21_biocrnpyler_287046_k*complex_Core2_AI_biocrnpyler_287046*protein_RNAseH_biocrnpyler_287046;
    r21_biocrnpyler_287046_k = 111.8242;
  r21_1_biocrnpyler_287046: complex_Core2_AI_protein_RNAseH_biocrnpyler_287046 => complex_Core2_AI_biocrnpyler_287046 + protein_RNAseH_biocrnpyler_287046; r21_1_biocrnpyler_287046_k*complex_Core2_AI_protein_RNAseH_biocrnpyler_287046;
    r21_1_biocrnpyler_287046_k = 10;
  r23_biocrnpyler_287046: complex_Core2_AI_protein_RNAseH_biocrnpyler_287046 => dna_dA1_biocrnpyler_287046 + protein_RNAseH_biocrnpyler_287046; r23_biocrnpyler_287046_k*complex_Core2_AI_protein_RNAseH_biocrnpyler_287046;
    r23_biocrnpyler_287046_k = 0.176;

  // Unit definitions:
  unit square_metre = metre^2;
  unit per_second = 1 / second;
  unit substance = dimensionless;
end
